// COMSOL Multiphysics 5.4.0.346 model "model.mph"
// Outline of the model tree

Common definitions
  mpf1: ParticipationFactors

Geometry
  geom1 "Geometry 1" (2D, length unit m)
    b1: BezierPolygon "Bézier Polygon 1" | p = {{0, 0.3}, {0, 0}}; degree = 1; w = {1, 1}
    b2: BezierPolygon "Bézier Polygon 2" | p = {{0.3, 0.4}, {0, 0}}; degree = 1; w = {1, 1}
    b3: BezierPolygon "Bézier Polygon 3" | p = {{0.4, 1}, {0, 0}}; degree = 1; w = {1, 1}
    fin: Finalize "Form Union"

Materials
  mat1: Common "Material 1" on all boundaries
    def "Basic"
      youngsmodulus = 1920000
      poissonsratio = .3
      density = 400

Physics
  beam: HermitianBeam on all boundaries
    dependent variable u = {u, v, w}
    emm1: Elastic "Linear Elastic Material 1" (default)
    csd1: CrossSectionBeam "Pristin Cross Section" (default)
      CrossSectionDefinition = CommonSections
      hy_rect = 0.05
      hz_rect = 0.05
      area = 0.0025[m^2]
      Izz = (0.05^4/12)[m^4]
    free1: Free (default)
    init1: init "Initial Values 1" (default)
    csd2: CrossSectionBeam "Damaged Cross Section" on boundaries 2
      CrossSectionDefinition = CommonSections
      hy_rect = 0.01
      hz_rect = 0.05
    pdr1: DispRot0 "Prescribed Displacement/Rotation 1" on points 1 | Direction = {1, 1, 0}
    pdr2: DispRot0 "Prescribed Displacement/Rotation 2" on points 4 | Direction = {1, 1, 0}

Mesh
  mesh1 "Mesh 1"
    edg1: Edge on boundaries 1
      dis1: Distribution on boundaries 1 | numelem = 15
    edg2: Edge on boundaries 3
      dis1: Distribution on boundaries 3 | numelem = 30
    edg3: Edge on boundaries 2
      dis1: Distribution on no boundaries

Studies
  std1 "Free Vibration"
    eig: Eigenfrequency | neigs = 10; shift = 10[Hz]

Solver configurations
  sol1 "Solution 1" (study std1)
    v1: Variables "Dependent Variables 1"
    e1: Eigenvalue "Eigenvalue Solver 1" | rtol = 1.0E-10
      dDef: Direct

Datasets
  dset1: Solution | solution = sol1

Evaluation groups
  std1EvgFrq: EvaluationGroup "Eigenfrequencies (Free Vibration)" | data = dset1
    gev1: EvalGlobal "Global Evaluation 1"
      expr = {freq*2*pi, imag(freq)/abs(freq), abs(freq)/imag(freq)/2}
      unit = {rad/s, 1, 1}
      descr = {Angular frequency, Damping ratio, Quality factor}

Plots
  pg1: PlotGroup2D "Mode Shape (beam)" | data = dset1
    line1: Line | expr = beam.disp; linetype = tube; radiusexpr = beam.re; tuberadiusscale = 0.1
      def: Deform "Deformation" | expr = {u, v}; descr = Displacement field

Exports
  data1: Data
    data = dset1
    expr = {v, freq}
    unit = {m, 1/s}
    descr = {"Displacement field, Y component", Frequency}
    filename = D:\Desktop\Untitled.txt